<Lems>

    <!--

        This LEMS file has been automatically generated using PyNeuroML v0.7.0 (libNeuroML v0.4.0)

     -->

    <!-- Specify which component to run -->
    <Target component="pyr_single_comp"/>

    <!-- Include core NeuroML2 ComponentType definitions -->
    <Include file="Cells.xml"/>
    <Include file="Networks.xml"/>
    <Include file="Simulation.xml"/>

    <Include file="pyr_example_net.nml"/>
    <Include file="pyr5_cell.nml"/>
    <Include file="pas.channel.nml"/>
    <Include file="nap.channel.nml"/>

    <Simulation id="pyr_single_comp" length="700ms" step="0.01ms" target="single_pyr_cell_network" seed="123">  <!-- Note seed: ensures same random numbers used every run -->

        <OutputFile id="output0" fileName="pyr_single_comp.dat">
            <OutputColumn id="pop0[0]_v" quantity="pop0[0]/v"/>
        </OutputFile>

    </Simulation>

</Lems>
